Clear
Redirect LoadShapes_ckt7.dss
Redirect Substation_ckt7.dss
Redirect LineCodes_ckt7.dss
Redirect Lines_ckt7.dss
Redirect Services_ckt7.dss
Redirect Load_XFMR_ckt7.dss
Redirect Loads_ckt7.dss
Redirect Capacitors_ckt7.dss

redirect AllocationFactors.dss

Set voltagebases = [115, 12.47, 0.480, 0.4157, 0.208, 0.12]

New Energymeter.25607 element=line.333 terminal=1 peakcurrent=[272.4, 243.4, 272.0]

Calcv
