!------------------------------------------------------------------------------------
! Script to run IEEE 34-bus Test Feeder Mod 2
!------------------------------------------------------------------------------------
!
! change the path to the appropriate location on your computer.

Compile (C:\OpenDSS\IEEETest\ieee34Mod2.dss)

set maxcontroliter=300
solve

show voltages LN Nodes
show currents residual=y elements
show powers kva element
show taps


!-----------------------------------------------------------------------------
!--------2nd Run Script for 34-bus Test Case---------------------------------
!-----------------------------------------------------------------------------

! This script forces the regulator taps to the same values reported in the
! published results

Compile (C:\OpenDSS\IEEETest\ieee34Mod2.dss)

! Force Regulator Transformer taps
Transformer.reg1a.wdg=2 Tap=(0.00625  12  * 1 +)   ! Tap 12
Transformer.reg1b.wdg=2 Tap=(0.00625   5 * 1 +)    ! Tap 5
Transformer.reg1c.wdg=2 Tap=(0.00625   5  * 1 +)   ! Tap 5
Transformer.reg2a.wdg=2 Tap=(0.00625  13 * 1 +)    ! Tap 13
Transformer.reg2b.wdg=2 Tap=(0.00625  11 * 1 +)    ! Tap 11
Transformer.reg2c.wdg=2 Tap=(0.00625  12 * 1 +)    ! Tap 12

Set Controlmode=OFF  ! prevents further tap changes

set maxcontroliter=300
solve

show voltages LN Nodes
show currents residual=y elements
show powers kva element
show taps
