# Worksheet setting: ORIGIN = 1
# The Modeling and Analysis of a Three Winding Power Transformer
# W. H. Kersting
# Milsoft Utility Solutions
# February 2014
# Transformer Model Test System
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# Transmission Line Pole Configuration
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# Phase Conductors:  "Linnett"  336/400/ 26/7 ACSR
# Neutral Conductor:  4/0 ACSR
GMR_p := 0.0244
r_p := 0.306
GMR_n := 0.00814
r_n := 0.592
# Define pole positions:
d[1] := 2 + 1j*50
d[2] := 0 + 1j*42
d[3] := 16 + 1j*42
d[4] := 8 + 1j*58
# Compute distances between positions:
i := 1 .. 4
j := 1 .. 4
D[i, j] := |d[i] - d[j]|
# Set diagonal term of the spacing matrix to the appropriate GMR and define resistances:
i := 1 .. 3
D[i, i] := GMR_p
r[i] := r_p
D[4, 4] := GMR_n
r[4] := r_n
# Display distance matrix:
D = [
    0.0244, 8.24621, 16.1245, 10;
    8.24621, 0.0244, 16, 17.8885;
    16.1245, 16, 0.0244, 17.8885;
    10, 17.8885, 17.8885, 0.00814
]
# Plug into modified Carson's equations:
i := 1 .. 4
j := 1 .. 4
zp[i, j] := .0953 + 1j*.12134*(ln(1/D[i, j]) + 7.934)
zp[i, i] := r[i] + zp[i, i]
# Display primitive impedance matrix:
zp = [
    0.4013 + 1.41327j, 0.0953 + 0.706714j, 0.0953 + 0.625345j, 0.0953 + 0.683316j;
    0.0953 + 0.706714j, 0.4013 + 1.41327j, 0.0953 + 0.626286j, 0.0953 + 0.612748j;
    0.0953 + 0.625345j, 0.0953 + 0.626286j, 0.4013 + 1.41327j, 0.0953 + 0.612748j;
    0.0953 + 0.683316j, 0.0953 + 0.612748j, 0.0953 + 0.612748j, 0.6873 + 1.54647j
]
# Kron reduction:
n := 1 .. 3
m := 1 .. 3
z4_ABC[n, m] := zp[n, m] - zp[n, 4]*zp[4, m]/zp[4, 4]
# Display phase impedance matrix
z4_ABC = [
    0.440846 + 1.13479j, 0.126906 + 0.455888j, 0.126906 + 0.374519j;
    0.126906 + 0.455888j, 0.42616 + 1.18741j, 0.12016 + 0.400423j;
    0.126906 + 0.374519j, 0.12016 + 0.400423j, 0.42616 + 1.18741j
]  # Ω/mile
# Standard Distribution Pole Configuration
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# Phase Conductors:  "Linnett"  336/400/ 26/7 ACSR
# Neutral Conductor:  4/0 ACSR
GMR_p := 0.0244
r_p := 0.306
GMR_n := 0.00814
r_n := 0.592
# Compute the phase impedance matrix for a four wire wye line:
# From tables:
GMR_p := .0244
r_p := .306
GMR_n := .00814
r_n := .592
# Define pole positions:
d[1] := 0 + 1j*35
d[2] := 2.5 + 1j*35
d[3] := 7 + 1j*35
d[4] := 4 + 1j*31
# Compute distances between positions:
i := 1 .. 4
j := 1 .. 4
D[i, j] := |d[i] - d[j]|
# Set diagonal term of the spacing matrix to the appropriate GMR and define resistances:
i := 1 .. 3
D[i, i] := GMR_p
r[i] := r_p
D[4, 4] := GMR_n
r[4] := r_n
# Display distance matrix:
D = [0.0244, 2.5, 7, 5.65685; 2.5, 0.0244, 4.5, 4.272; 7, 4.5, 0.0244, 5; 5.65685, 4.272, 5, 0.00814]
# Plug into modified Carson's equations:
i := 1 .. 4
j := 1 .. 4
zp[i, j] := .0953 + 1j*.12134*(ln(1/D[i, j]) + 7.934)
zp[i, i] := r[i] + zp[i, i]
# Display primitive impedance matrix:
zp = [
    0.4013 + 1.41327j, 0.0953 + 0.851529j, 0.0953 + 0.726595j, 0.0953 + 0.752445j;
    0.0953 + 0.851529j, 0.4013 + 1.41327j, 0.0953 + 0.780207j, 0.0953 + 0.786516j;
    0.0953 + 0.726595j, 0.0953 + 0.780207j, 0.4013 + 1.41327j, 0.0953 + 0.767422j;
    0.0953 + 0.752445j, 0.0953 + 0.786516j, 0.0953 + 0.767422j, 0.6873 + 1.54647j
]
# Kron reduction:
n := 1 .. 3
m := 1 .. 3
z4_abc[n, m] := zp[n, m] - zp[n, 4]*zp[4, m]/zp[4, 4]
# Display phase impedance matrix
z4_abc = [
    0.457551 + 1.07803j, 0.15595 + 0.501673j, 0.153484 + 0.384933j;
    0.15595 + 0.501673j, 0.466627 + 1.04816j, 0.158006 + 0.423647j;
    0.153484 + 0.384933j, 0.158006 + 0.423647j, 0.461472 + 1.06506j
]  # Ω/mile
# Three wire delta line:
n := 1 .. 3
m := 1 .. 3
z3_123[n, m] := zp[n, m]
z3_123 = [
    0.4013 + 1.41327j, 0.0953 + 0.851529j, 0.0953 + 0.726595j;
    0.0953 + 0.851529j, 0.4013 + 1.41327j, 0.0953 + 0.780207j;
    0.0953 + 0.726595j, 0.0953 + 0.780207j, 0.4013 + 1.41327j
]
# Define length of line segments and compute phase impedance matrices for each line section:
L_12 := 5
L_34 := 1
L_56 := 150/5280
Z_ABC := z4_ABC*L_12
Z_ABC = [
    2.20423 + 5.67395j, 0.634529 + 2.27944j, 0.634529 + 1.8726j;
    0.634529 + 2.27944j, 2.1308 + 5.93703j, 0.600802 + 2.00211j;
    0.634529 + 1.8726j, 0.600802 + 2.00211j, 2.1308 + 5.93703j
]
Z_abc := z4_abc*L_34
Z_abc = [
    0.457551 + 1.07803j, 0.15595 + 0.501673j, 0.153484 + 0.384933j;
    0.15595 + 0.501673j, 0.466627 + 1.04816j, 0.158006 + 0.423647j;
    0.153484 + 0.384933j, 0.158006 + 0.423647j, 0.461472 + 1.06506j
]
Z_123 := z3_123*L_56
Z_123 = [
    0.0114006 + 0.0401497j, 0.00270739 + 0.0241912j, 0.00270739 + 0.0206419j;
    0.00270739 + 0.0241912j, 0.0114006 + 0.0401497j, 0.00270739 + 0.022165j;
    0.00270739 + 0.0206419j, 0.00270739 + 0.022165j, 0.0114006 + 0.0401497j
]
# Grounded wye-delta-grounded wye circuit
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# Transformer Ratings:
kVA_p := 15000
kVLL_p := 69
kVA_s := 10000
kVLL_s := 13.2
kVA_t := 5000
kVLL_t := 2.4
# Define per-unit transfer impedances based upon primary kVA rating and rated winding voltages
Zpu_ps := 0.0015 + 0.07j
Zpu_pt := 0.002 + 0.09j
Zpu_st := 0.0026 + 0.12j
# Define transfer impedances matrices in per-unit
ZPS_pu := [Zpu_ps, 0, 0; 0, Zpu_ps, 0; 0, 0, Zpu_ps]
ZPS_pu = [0.0015 + 0.07j, 0, 0; 0, 0.0015 + 0.07j, 0; 0, 0, 0.0015 + 0.07j]
ZPT_pu := [Zpu_pt, 0, 0; 0, Zpu_pt, 0; 0, 0, Zpu_pt]
ZPT_pu = [0.002 + 0.09j, 0, 0; 0, 0.002 + 0.09j, 0; 0, 0, 0.002 + 0.09j]
ZST_pu := [Zpu_st, 0, 0; 0, Zpu_st, 0; 0, 0, Zpu_st]
ZST_pu = [0.0026 + 0.12j, 0, 0; 0, 0.0026 + 0.12j, 0; 0, 0, 0.0026 + 0.12j]
# Compute winding impedances in per-unit
ZP_pu := 1/2*(ZPS_pu + ZPT_pu - ZST_pu)
ZP_pu = [0.00045 + 0.02j, 0, 0; 0, 0.00045 + 0.02j, 0; 0, 0, 0.00045 + 0.02j]
ZS_pu := 1/2*(ZPS_pu + ZST_pu - ZPT_pu)
ZS_pu = [0.00105 + 0.05j, 0, 0; 0, 0.00105 + 0.05j, 0; 0, 0, 0.00105 + 0.05j]
ZT_pu := 1/2*(ZPT_pu + ZST_pu - ZPS_pu)
ZT_pu = [0.00155 + 0.07j, 0, 0; 0, 0.00155 + 0.07j, 0; 0, 0, 0.00155 + 0.07j]
# Compute base impedances using primary kVA as base and winding LL voltages
# Set base kVA
kVA_base := kVA_p
kVA_base = 15000
# Primary bases:
kVLN_p := kVLL_p/sqrt(3)
kVLN_p = 39.8372
Ibase_p := kVA_base/(sqrt(3)*kVLL_p)
Ibase_p = 125.511
Zbase_p := kVLN_p*1000/Ibase_p
Zbase_p = 317.4
# Secondary bases:
kVLN_s := kVLL_s/sqrt(3)
kVLN_s = 7.62102
Ibase_s := kVA_base/(sqrt(3)*kVLL_s)
Ibase_s = 656.08
Zbase_s := kVLN_s*1000/Ibase_s
Zbase_s = 11.616
# Tertiary bases:
kVLN_t := kVLL_t/sqrt(3)
kVLN_t = 1.38564
Ibase_t := kVA_base/(3*kVLL_t)
Ibase_t = 2083.33
Zbase_t := kVLL_t*1000/Ibase_t
Zbase_t = 1.152
# Note this is the base impedance to compute the winding impedance inside the delta winding
# Compute winding impedance matrices in Ohms
ZP := ZP_pu*Zbase_p
ZP = [0.14283 + 6.348j, 0, 0; 0, 0.14283 + 6.348j, 0; 0, 0, 0.14283 + 6.348j]
ZS := ZS_pu*Zbase_s
ZS = [0.0121968 + 0.5808j, 0, 0; 0, 0.0121968 + 0.5808j, 0; 0, 0, 0.0121968 + 0.5808j]
ZT := ZT_pu*Zbase_t
ZT = [0.0017856 + 0.08064j, 0, 0; 0, 0.0017856 + 0.08064j, 0; 0, 0, 0.0017856 + 0.08064j]
# Define winding ratios:
n_ps := kVLN_p/kVLN_s
n_ps = 5.22727
n_pt := kVLN_p/kVLL_t
n_pt = 16.5988
n_st := kVLN_s/kVLL_t
n_st = 3.17543
# Define needed matrices:
DI := [1, 0, -1; -1, 1, 0; 0, -1, 1]
W := 1/3*[2, 1, 0; 0, 2, 1; 1, 0, 2]
DV := [1, -1, 0; 0, 1, -1; -1, 0, 1]
One := [1, 1, 1; 1, 1, 1; 1, 1, 1]
U := [1, 0, 0; 0, 1, 0; 0, 0, 1]
# Define base V and I matrices:
AV_ps := n_ps*U
AV_ps = [5.22727, 0, 0; 0, 5.22727, 0; 0, 0, 5.22727]
AI_ps := AV_ps
AV_pt := n_pt*U
AV_pt = [16.5988, 0, 0; 0, 16.5988, 0; 0, 0, 16.5988]
AI_pt := AV_pt
AV_st := n_st*U
AV_st = [3.17543, 0, 0; 0, 3.17543, 0; 0, 0, 3.17543]
AI_st := AV_st
# Define loads:
i := 1 .. 3
# Wye load:
SY := [1250 + 1j*500; 1500 + 1j*750; 1000 + 1j*250]
# Delta Load:
SD := [750 + 1j*375; 750 + 1j*375; 750 + 1j*375]
# Compute constant Z for the delta load:
S_D := SD[1]
S_D = 750 + 375j
ISD := conj(S_D/conj(kVLL_t))
ISD = 312.5 - 156.25j
Z_D := kVLL_t*1000/ISD
Z_D = 6.144 + 3.072j
ZD := [Z_D; Z_D; Z_D]
ZD = [6.144 + 3.072j; 6.144 + 3.072j; 6.144 + 3.072j]
# Define source LN voltages:
i := 1 .. 3
a := 1*e^(1j*120*deg)
ELN := kVLN_p*1000
ELN = 39837.2
ELN_ABC := [ELN; a^2*ELN; a*ELN]
|ELN_ABC[i]| = [39837.2; 39837.2; 39837.2]
arg(ELN_ABC[i])/deg = [0; -120; 120]
Tol := .00001
start := [0; 0; 0]
R_g := 0
ZG := R_g*One
ZG = [0, 0, 0; 0, 0, 0; 0, 0, 0]
X :=
    I_ABC ← start
    I_abc ← start
    ID_123 ← start
    I_123 ← start
    V_old ← start
    for n ∈ 1 .. 40
        V_ng ← ZG*(I_ABC - I_abc)
        V2LG_ABC ← ELN_ABC - Z_ABC*I_ABC
        Vt_ABC ← V2LG_ABC - ZP*I_ABC - V_ng
        Vt_abc ← AV_ps^-1*Vt_ABC
        V3LG_abc ← Vt_abc - ZS*I_abc
        V4LG_abc ← V3LG_abc - Z_abc*I_abc
        Vt_123 ← AV_pt^-1*Vt_ABC
        V5LL_123 ← Vt_123 - ZT*ID_123
        V5LN_123 ← W*V5LL_123
        V6LN_123 ← V5LN_123 - Z_123*I_123
        V6LL_123 ← DV*V6LN_123
        for i ∈ 1 .. 3
            Error[i] ← |V4LG_abc[i] - V_old[i]|/(kVLN_s*1000)
        Err_max ← max(Error)
        if Err_max < Tol
            {
                break
            }
        for i ∈ 1 .. 3
            I_abc[i] ← conj(SY[i]*1000/V4LG_abc[i])
            IL[i] ← V6LL_123[i]/ZD[i]
        I_123 ← DI*IL
        F ← [1, 0, -1; -1, 1, 0; n_pt*ZT[1, 1], n_pt*ZT[2, 2], n_pt*ZT[3, 3]]
        Fx ← [1, 0, -1; -1, 1, 0; ZT[1, 1], ZT[2, 2], ZT[3, 3]]
        V_sum ← sum(Vt_ABC[k], k = 1 .. 3)
        X ← [I_123[1]; I_123[2]; V_sum]
        G ← F^-1
        ID_123 ← G*X
        I_ABC ← AI_pt^-1*ID_123 + AI_ps^-1*I_abc
        V_old ← V4LG_abc
    Out[1] ← n
    Out[2] ← Err_max
    Out[3] ← V_ng
    Out[4] ← I_ABC
    Out[5] ← I_abc
    Out[6] ← ID_123
    Out[7] ← I_123
    Out[8] ← IL
    Out[9] ← V2LG_ABC
    Out[10] ← V3LG_abc
    Out[11] ← V4LG_abc
    Out[12] ← Vt_ABC
    Out[13] ← Vt_abc
    Out[14] ← Vt_123
    Out[15] ← V5LL_123
    Out[16] ← V6LL_123
    Out
Iterations := X[1]
Iterations = 22
Err_max := X[2]
Err_max = 7.61655e-6
V_ng := X[3]
V_ng = [0; 0; 0]
I_ABC := X[4]
|I_ABC[i]| = [56.6927; 61.7283; 47.8035]
arg(I_ABC[i])/deg = [-22.9324; -149.077; 96.0313]
I_abc := X[5]
|I_abc[i]| = [182.194; 228.291; 136.865]
arg(I_abc[i])/deg = [-23.5156; -149.157; 104.129]
ID_123 := X[6]
|ID_123[i]| = [362.565; 299.699; 368.334]
arg(ID_123[i])/deg = [-22.0016; -148.881; 86.4645]
I_123 := X[7]
|I_123[i]| = [593.063; 593.039; 592.477]
arg(I_123[i])/deg = [-58.0943; -178.158; 61.8756]
IL := X[8]
|IL[i]| = [342.508; 342.17; 342.184]
arg(IL[i])/deg = [-28.127; -148.157; 91.907]
V2LG_ABC := X[9]
|V2LG_ABC[i]| = [39650.5; 39644.1; 39718]
arg(V2LG_ABC[i])/deg = [-0.184215; -120.263; 119.788]
V3LG_ABC := X[10]
|V3LG_ABC[i]| = [7514.99; 7482.14; 7551.67]
arg(V3LG_ABC[i])/deg = [-1.39792; -121.638; 118.812]
V4LG_abc := X[11]
|V4LG_abc[i]| = [7389.32; 7346.16; 7531.31]
arg(V4LG_abc[i])/deg = [-1.71464; -122.592; 118.165]
Vt_ABC := X[12]
|Vt_ABC[i]| = [39505.2; 39449; 39590.4]
arg(Vt_ABC[i])/deg = [-0.661033; -120.755; 119.39]
Vt_abc := X[13]
|Vt_abc[i]| = [7557.51; 7546.77; 7573.82]
arg(Vt_abc[i])/deg = [-0.661033; -120.755; 119.39]
Vt_123 := X[14]
|Vt_123[i]| = [2380; 2376.61; 2385.13]
arg(Vt_123[i])/deg = [-0.661033; -120.755; 119.39]
V5LL_123 := X[15]
|V5LL_123[i]| = [2368.91; 2364.84; 2368.56]
arg(V5LL_123[i])/deg = [-1.31401; -121.266; 118.796]
V6LL_123 := X[16]
|V6LL_123[i]| = [2352.76; 2350.44; 2350.53]
arg(V6LL_123[i])/deg = [-1.56194; -121.592; 118.472]
# Compute PQ at the two nodes based upon solution
S_y[i] := V4LG_abc[i]*conj(I_abc[i])/1000
S_y = [1250 + 499.99j; 1500.01 + 750.011j; 999.993 + 250.002j]
S_d[i] := V6LL_123[i]*conj(IL[i])/1000
S_d = [720.765 + 360.382j; 719.342 + 359.671j; 719.4 + 359.7j]
