/********************************************************************************************************  fixed shunt definitions for 115.0kV  ***/

New Capacitor.Capa_at9_1 bus1=9_bus9 phases=3 kv=115.0 kvar=6332.999999999999 R=0.0 conn=wye
