New "Spectrum.Spectrum_1" NumHarm=8 CSVFile=Spectrum_Load_1.csv
New "Spectrum.Spectrum_2" NumHarm=8 CSVFile=Spectrum_Load_2.csv
New "Spectrum.Spectrum_3" NumHarm=8 CSVFile=Spectrum_Load_3.csv

batchedit load..* spectrum=spectrum_1 where class=1
batchedit load..* spectrum=defaultload where class=2
batchedit load..* spectrum=spectrum_1 where class=3

new monitor.PCC element=line.tyn202_w_5_105_abc95851 terminal=1 mode=0
