New EnergyMeter.tyn202_sw element=Line.tyn202_sw terminal=1 action=clear option=(E, R, C) kVAnormal=0.0 kVAemerg=0.0 LocalOnly=No Mask=[1 1 1 1 1 1 1 1 1 1 1 1 1 1 1 1 1 1 1 1 1 1 1 1 1 1 1 1 1 1 1 1 1 1 1 1 1 1 1 1 1 1 1 1 1 1 1 1 1 1 1 1 1 1 1 1 1 1 1 1 1 1 1 1 1 1 1 ] Losses=Yes LineLosses=Yes XfmrLosses=Yes SeqLosses=Yes 3phaseLosses=Yes VbaseLosses=Yes PhaseVoltageReport=No Int_Rate=0 Int_Duration=0 SAIFI=0 SAIFIkW=0 SAIDI=0 CAIDI=0 CustInterrupts=0 enabled=true
