New Loadshape.MyIrrad npts=24 interval=1 mult=[0 0 0 0 0 0 .1 .2 .3  .5  .8  .9  1.0  1.0  .99  .9  .7  .4  .1 0  0  0  0  0]

new xycurve.safetyv npts=5 xarray=[0.5, 0.88, 1.1, 1.2, 1.5] yarray=[1.1, 3.0, 2.0, 2.0, 0.16]

new Transformer.TPV1 phases=3 windings=2 buses=(29636.1.2.3 PVBus.1.2.3) conns=(delta wye) kvs=(12.47 0.416) kvas=(25 25) taps='1 1' XHL=0.5

new PVsystem.tyn202_x_2_023_a41222-1_0 phases=3 bus1=PVBus.1.2.3 kV=0.416 kva=20.39621 pmpp=20.39621 irradiance=1 vminpu=0.1 vmaxpu=1.3
~ yearly=MyIrrad SafeMode=No %R=50 %X=50 kP=0.8 KVDC=0.700 PITol=0.1 SafeVoltage=0
~ vridecurve=safetyv vrideaction=[2,1,0,2,3]

new monitor.PVPQ element=PVsystem.tyn202_x_2_023_a41222-1_0 terminal=1 mode=1 ppolar=No
new monitor.PVVI element=PVsystem.tyn202_x_2_023_a41222-1_0 terminal=1 mode=0
new monitor.PVST element=PVsystem.tyn202_x_2_023_a41222-1_0 terminal=1 mode=3

set maxcontroliter=100 maxiterations=50 controlmode=off
