New Loadshape.MyIrrad npts=24 interval=1 mult=[0 0 0 0 0 0 .1 .2 .3  .5  .8  .9  1.0  1.0  .99  .9  .7  .4  .1 0  0  0  0  0]

new xycurve.safetyv npts=5 xarray=[0.5, 0.88, 1.1, 1.2, 1.5] yarray=[1.1, 3.0, 2.0, 2.0, 0.16]

new Transformer.TPV1 phases=3 windings=2 buses=(29636.1.2.3 BESSBus.1.2.3) conns=(delta wye) kvs=(12.47 0.416) kvas=(100 100) taps='1 1' XHL=0.5

New Storage.Storage1 phases=3 bus1=BESSBus kv=0.416 pf=1 kWrated=50 %reserve=20
~ effcurve=Eff kWhrated=500 %stored=100 kW=10 state=discharging vridecurve=safetyv vrideaction=[2,1,0,2,3]
~ SafeMode=No %R=50 %X=50 kP=0.8 KVDC=0.700 PITol=0.01 SafeVoltage=0 vminpu=0.1 vmaxpu=1.3
new monitor.BESSPQ element=Storage.Storage1 terminal=1 mode=1 ppolar=No
new monitor.BESSVI element=Storage.Storage1 terminal=1 mode=0
new monitor.BESSST element=Storage.Storage1 terminal=1 mode=3

set maxcontroliter=100 maxiterations=50 controlmode=off
